// SBML level 2 version 3
// | @file    me.xml
//  | @author  Emmet Caulfield
//  | @brief   Validated SBML model for a metabolite-enzyme
//  |          reaction.
//  | @version 0.3
//  |
//  | This is an initial attempt at describing the reaction in
//  | Section 5.1, "Metabolites controled (sic.) by enzymes",
//  | on p.15 of Hellander & Lotstedt, "Hybrid Method for the
//  | Chemical Master Equation", 2006.
//  |
//  | $Id: me-opt.xml 39 2009-01-23 19:40:59Z emmet $

model MetaboliteEnzyme()

  // Compartments:
  compartment cell = 1;

  // Species:
  species A in cell = 10/cell; A is "Species A";
  species B in cell = 10/cell; B is "Species B";
  species Ea in cell = 10/cell; Ea is "Enzyme A";
  species Eb in cell = 10/cell; Eb is "Enzyme B";

  // Parameters:
  kA = 0.3;
  kB = 0.3;
  k2 = 0.001;
  Ki = 60;
  mu = 0.002;
  kEa = 0.02;
  kEb = 0.02;
  Kr = 30;

  // Reactions:
  SynthA: => A; kA*Ea/(1 + A/Ki);  // modifiers: Ea
  SynthB: => B; kB*Eb/(1 + B/Ki);  // modifiers: Eb
  AnnhiAB: A + B => ; k2*A*B;
  AnnhiA: A => ; mu*A;
  AnnhiB: B => ; mu*B;
  AnnhiEa: Ea => ; mu*Ea;
  SynthEb: => Eb; kEb/(1 + B/Kr);  // modifiers: B
  AnnhiEb: Eb => ; mu*Eb;
  SynthEa: => Ea; kEa/(1 + A/Kr);  // modifiers: A
end
