// SBML level 2 version 3
// | @file    hsr.xml
//  | @author  Emmet Caulfield
//  | @brief   Validated SBML model for E.Coli Heat-Shock Reaction
//  | @version $Rev: 41 $
//  |
//  | This is an update to SBML l.2/v.3 of the E.Coli HSR in
//  | StochKit. The (rather uninformative) reaction, species and
//  | parameter names from the original have been retained and
//  | unnecessary or illegal attributes eliminated.
//  |
//  | Hong Li, Yang Cao, Kevin Sanft, Min K Roh, Marc B. Griesemer,
//  | Fenglin Liao, "StochKit" Beta, 2004:
//  |
//  |    * http://www.engineering.ucsb.edu/~cse/StochKit/
//  |
//  | $Id: hsr-opt.xml 39 2009-01-23 19:40:59Z emmet $

model HeatShock()

  // Compartments:
  compartment cell = 1;

  // Species:
  species S1 in cell = 0;
  species S2 in cell = 0;
  species S3 in cell = 0;
  species S4 in cell = 0;
  species S5 in cell = 1/cell;
  species S6 in cell = 4645670/cell;
  species S7 in cell = 1324/cell;
  species S8 in cell = 80/cell;
  species S9 in cell = 16/cell;
  species S10 in cell = 3413/cell;
  species S11 in cell = 29/cell;
  species S12 in cell = 584/cell;
  species S13 in cell = 1/cell;
  species S14 in cell = 22/cell;
  species S15 in cell = 0;
  species S16 in cell = 171440/cell;
  species S17 in cell = 9150/cell;
  species S18 in cell = 2280/cell;
  species S19 in cell = 6/cell;
  species S20 in cell = 596/cell;
  species S21 in cell = 0;
  species S22 in cell = 13/cell;
  species S23 in cell = 3/cell;
  species S24 in cell = 3/cell;
  species S25 in cell = 7/cell;
  species S26 in cell = 0;
  species S27 in cell = 260/cell;
  species S28 in cell = 0;

  // Parameters:
  C1 = 2.54;
  C2 = 1;
  C3 = 0.254;
  C4 = 1;
  C5 = 0.0254;
  C6 = 10;
  C7 = 254;
  C8 = 10000;
  C9 = 0.000254;
  C10 = 0.01;
  C11 = 0.000254;
  C12 = 1;
  C13 = 0.000254;
  C14 = 1;
  C15 = 2.54;
  C16 = 1;
  C17 = 2540;
  C18 = 1000;
  C19 = 0.0254;
  C20 = 1;
  C21 = 6.62;
  C22 = 0.5;
  C23 = 20;
  C24 = 0.03;
  C25 = 0.03;
  C26 = 0.03;
  C27 = 0.03;
  C28 = 0.03;
  C29 = 1.67;
  C30 = 0.5;
  C31 = 20;
  C32 = 0.03;
  C33 = 0.03;
  C34 = 0.00625;
  C35 = 0.5;
  C36 = 7;
  C37 = 0.03;
  C38 = 3;
  C39 = 0.7;
  C40 = 0.5;
  C41 = 1;
  C42 = 0.5;
  C43 = 20;
  C44 = 0.03;
  C45 = 0.03;
  C46 = 2.54;
  C47 = 10000;
  C48 = 0.43333;
  C49 = 0.5;
  C50 = 20;
  C51 = 0.03;
  C52 = 0.03;
  C53 = 2.54;
  C54 = 10000;
  C55 = 0.03;
  C56 = 0.03;
  C57 = 0.03;
  C58 = 0.03;
  C59 = 0.03;
  C60 = 0.03;
  C61 = 0.03;

  // Reactions:
  Reaction46: S4 + S20 => S21; C46*S4*S20;
  Reaction47: S21 => S4 + S20; C47*S21;
  Reaction7: S4 + S14 => S15; C7*S4*S14;
  Reaction8: S15 => S4 + S14; C8*S15;
  Reaction6: S7 => S1 + S6; C6*S7;
  Reaction5: S1 + S6 => S7; C5*S1*S6;
  Reaction53: S15 + S27 => S28; C53*S15*S27;
  Reaction54: S28 => S15 + S27; C54*S28;
  Reaction17: S5 + S11 => S13; C17*S5*S11;
  Reaction18: S13 => S5 + S11; C18*S13;
  Reaction16: S12 => S3 + S10; C16*S12;
  Reaction15: S3 + S10 => S12; C15*S3*S10;
  Reaction9: S16 + S14 => S17; C9*S14*S16;
  Reaction25: S17 => S16; C25*S17;
  Reaction23: => S14; C23*S22;  // modifiers: S22
  Reaction12: S8 => S3 + S6; C12*S8;
  Reaction11: S3 + S6 => S8; C11*S3*S6;
  Reaction19: S15 + S18 => S19; C19*S15*S18;
  Reaction10: S17 => S16 + S14; C10*S17;
  Reaction36: => S4; C36*S25;  // modifiers: S25
  Reaction31: => S18; C31*S23;  // modifiers: S23
  Reaction32: S18 => ; C32*S18;
  Reaction38: S19 => S18 + S14; C38*S19;
  Reaction43: => S20; C43*S24;  // modifiers: S24
  Reaction44: S20 => ; C44*S20;
  Reaction20: S19 => S15 + S18; C20*S19;
  Reaction50: => S27; C50*S26;  // modifiers: S26
  Reaction51: S27 => ; C51*S27;
  Reaction13: S5 + S6 => S9; C13*S5*S6;
  Reaction14: S9 => S5 + S6; C14*S9;
  Reaction22: S22 => ; C22*S22;
  Reaction21: S13 => S22 + S13; C21*S13;
  Reaction35: S25 => ; C35*S25;
  Reaction34: => S25; C34*S12;  // modifiers: S12
  Reaction39: S21 => S20; C39*S21;
  Reaction30: S23 => ; C30*S23;
  Reaction29: => S23; C29*S13;  // modifiers: S13
  Reaction42: S24 => ; C42*S24;
  Reaction41: => S24; C41*S13;  // modifiers: S13
  Reaction27: S19 => S4 + S18; C27*S19;
  Reaction33: S19 => S15; C33*S19;
  Reaction59: S19 => S14 + S18; C59*S19;
  Reaction37: S4 => ; C37*S4;
  Reaction3: S4 + S1 => S5; C3*S1*S4;
  Reaction57: S9 => S7; C57*S9;
  Reaction48: => S26; C48*S13;  // modifiers: S13
  Reaction49: S26 => ; C49*S26;
  Reaction24: S14 => ; C24*S14;
  Reaction45: S21 => S4; C45*S21;
  Reaction40: S28 => S14 + S27; C40*S28;
  Reaction2: S3 => S1 + S2; C2*S3;
  Reaction1: S1 + S2 => S3; C1*S1*S2;
  Reaction26: S15 => S4; C26*S15;
  Reaction58: S15 => S14; C58*S15;
  Reaction56: S13 => S1 + S11; C56*S13;
  Reaction61: S21 => S20; C61*S21;
  Reaction4: S5 => S4 + S1; C4*S5;
  Reaction28: S28 => S4 + S27; C28*S28;
  Reaction52: S28 => S15; C52*S28;
  Reaction60: S28 => S14 + S27; C60*S28;
  Reaction55: S5 => S1; C55*S5;
end
